// SBML level 3 version 1

model VilarModel_stochastic_repressor_activator_oscillations()
  // Minimal model of circadian clock, Vilar et al., PNAS (2002)
  // model units - substance: molecules, time: s, volume: um3, area: um2, length: um

  // Compartments:
  compartment cell = 1 um3;

  // Species:
  species mRNA_R in cell = 0;
  species A in cell = 0;
  species R in cell = 0;
  species PrmA in cell = 1;
  species PrmR in cell = 1;
  species C in cell = 0;
  species PrmA_bound in cell = 0;
  species PrmR_bound in cell = 0;
  species mRNA_A_ in cell = 0;

  // Parameters:
  common_delta_A = 1 s_1;
  _T_ = 300 K;
  _PI_ = 3.141593 _one_;
  _F_ = 9.64853321e4 C_mol_1;
  _F_nmol_ = 9.64853321e-5 C_nmol_1;
  _N_pmol_ = 6.02214179e11 molecules_pmol_1;
  _K_GHK_ = 1e-9 _one_000000000;
  _R_ = 8314.463 mV_C_K_1_mol_1;
  K_millivolts_per_volt = 1000 mV_V_1;
  KMOLE = 0.001660539 uM_um3_molecules_1;
  Kr_C_decay = 0 s_1;
  Kf_C_decay has s_1;
  Kf_A_decay has s_1;
  Kf_mRNA_A_decay = 10 s_1;
  Kf_mRNA_R_decay = 0.5 s_1;
  Kr_AR_binding = 0 s_1;
  Kf_AR_binding has s_1_uM_1;
  delta_R_R_decay = 0.2 s_1;
  alphaA_A_trnscr = 50 s_1;
  alphaA_prmbound_active_A_trnscr = 500 s_1;
  alphaR_R_trnsc = 0.01 s_1;
  alphaR_prmbound_active_R_trnsc = 50 s_1;
  Kr_PrmA_activation = 50 s_1;
  Kf_PrmA_activation has s_1_uM_1;
  Kr_PrmR_activation = 100 s_1;
  Kf_PrmR_activation has s_1_uM_1;
  betaR_R_trnsl = 5 s_1;
  betaA_A_trnsl = 50 s_1;

  // Assignment rules:
  Kf_C_decay := common_delta_A;
  Kf_A_decay := common_delta_A;
  Kf_AR_binding := 2*(1/KMOLE);
  Kf_PrmA_activation := 1*(1/KMOLE);
  Kf_PrmR_activation := 1*(1/KMOLE);

  // Reactions:
  C_decay: C -> R; (Kf_C_decay*C + (-(Kr_C_decay*R)))*cell;
  A_decay: A -> ; Kf_A_decay*A*cell;
    A_decay_Kr = 0 uM_s_1;
  mRNA_A_decay: mRNA_A_ -> ; Kf_mRNA_A_decay*mRNA_A_*cell;
    mRNA_A_decay_Kr = 0 uM_s_1;
  mRNA_R_decay: mRNA_R -> ; Kf_mRNA_R_decay*mRNA_R*cell;
    mRNA_R_decay_Kr = 0 uM_s_1;
  AR_binding: A + R -> C; (Kf_AR_binding*A*R + (-(Kr_AR_binding*C)))*cell;
  R_decay: R -> ; delta_R_R_decay*R*cell;
    R_decay_Kr = 0 uM_s_1;
  A_trnscr: PrmA -> mRNA_A_ + PrmA; alphaA_A_trnscr*PrmA*cell;
  active_A_trnscr: PrmA_bound -> mRNA_A_ + PrmA_bound; alphaA_prmbound_active_A_trnscr*PrmA_bound*cell;
  R_trnsc: PrmR -> mRNA_R + PrmR; alphaR_R_trnsc*PrmR*cell;
  active_R_trnsc: PrmR_bound -> mRNA_R + PrmR_bound; alphaR_prmbound_active_R_trnsc*PrmR_bound*cell;
  PrmA_activation: PrmA + A -> PrmA_bound; (Kf_PrmA_activation*PrmA*A + (-(Kr_PrmA_activation*PrmA_bound)))*cell;
  PrmR_activation: PrmR + A -> PrmR_bound; (Kf_PrmR_activation*PrmR*A + (-(Kr_PrmR_activation*PrmR_bound)))*cell;
  R_trnsl: mRNA_R -> R + mRNA_R; betaR_R_trnsl*mRNA_R*cell;
  A_trnsl: mRNA_A_ -> A + mRNA_A_; betaA_A_trnsl*mRNA_A_*cell;

  // Unit definitions:
  unit molecules = item;
  unit um3 = (1e-6 metre)^3;
  unit um2 = (1e-6 metre)^2;
  unit um = 1e-6 metre;
  unit s = second;
  unit s_1 = 1 / second;
  unit K = kelvin;
  unit _one_ = dimensionless;
  unit C_mol_1 = coulomb / mole;
  unit C_nmol_1 = coulomb / (1e-9 mole);
  unit molecules_pmol_1 = item / (1e-12 mole);
  unit _one_000000000 = 1e9 dimensionless;
  unit mV_C_K_1_mol_1 = 1e-3 volt * coulomb / (kelvin * mole);
  unit mV_V_1 = dimensionless;
  unit uM_um3_molecules_1 = 1e-6 mole * (1e-6 metre)^3 / (litre * item);
  unit uM_s_1 = 1e-6 mole / (litre * second);
  unit s_1_uM_1 = litre / (second * 1e-6 mole);
end
