// SBML level 2 version 4

function Function_for_re7(default, k6, k7, GDI_GTP_Rho, GTP_Rho, GDI)
  (k6*GTP_Rho*GDI*default - k7*GDI_GTP_Rho)/default;
end

function Function_for_re2(default, k2, Active_GEF)
  Active_GEF*k2/default;
end

function Function_for_re1(default, k1, Activator, GEF)
  Activator*default*GEF*default*k1/default;
end

function Function_for_re8(default, k8, k9, Effector_GTP_Rho, GTP_Rho, Effector)
  (k8*GTP_Rho*Effector*default - k9*Effector_GTP_Rho)/default;
end

function Function_for_re5(KmGAPGDI, KmGAPRho, default, kcatGAP, GTP_Rho, GDI, GAP)
  kcatGAP*GTP_Rho*GAP*default/(KmGAPRho*(1 + GDI*default/KmGAPGDI) + GTP_Rho*(1 + GDI*default/KmGAPGDI))/default;
end

function Function_for_re3(default, k3, Activator)
  Activator*default*k3/default;
end

function Function_for_re4(KmGEFGDI, KmGEFRho, default, kcatGEF, Active_GEF, GDP_Rho, GDI)
  kcatGEF*GDP_Rho*Active_GEF/(KmGEFRho*(1 + GDI*default/KmGEFGDI) + GDP_Rho*(1 + GDI*default/KmGEFGDI))/default;
end

function Function_for_re6(default, k4, k5, GDI_GDP_Rho, GDP_Rho, GDI)
  (k4*GDP_Rho*GDI*default - k5*GDI_GDP_Rho*default)/default;
end

model NoName()
  // Ota2015 - Positive regulation of Rho GTPase activity by RhoGDIs as a result of their direct interaction with GAPs (GDI integrated)
  // This is a ordinary differential equation mathematical model describing the Rho GTPase cycle in
  // which Rho GDP-dissociation inhibitors (RhoGDIs) inhibit the regulatory activities of guanine
  // nucleotide exchange factors (GEFs) and GTPase-activating proteins (GAPs) by interacting with them
  // directly as well as by sequestering the Rho GTPases. The model was constructed with the intent of
  // analyzing the role of RhoGDIs in Rho GTPase signaling.

  // Compartments:
  compartment default = 1;  // isVersionOf ncit:C12508

  // Species:
  species Activator in default = 1;  // isVersionOf ncit:C154897
  species Degrade in default = 0;  // isVersionOf ncit:C154897; hasProperty ncit:C154407
  species GEF in default = 0.31;  // ncit:C17494
  species Active_GEF in default = 0;  // hasProperty ncit:C45329
  species GDP_Rho in default = 0; GDP_Rho is "GDP-Rho";  // hasVersion PR:000000122
  species GTP_Rho in default = 0; GTP_Rho is "GTP-Rho";  // isVersionOf PR:000000122
  species GDI in default = 0;
  species GAP in default = 0.1;  // ncit:C17298
  species Effector in default = 1;  // isVersionOf CHEBI:35224
  species GDI_GDP_Rho in default = 1.3; GDI_GDP_Rho is "GDI·GDP-Rho";  // hasPart PR:000000122; hasPart PR:000004242
  species GDI_GTP_Rho in default = 0; GDI_GTP_Rho is "GDI·GTP-Rho";  // hasPart PR:000004242; hasProperty PR:000000122
  species Effector_GTP_Rho in default = 0; Effector_GTP_Rho is "Effector·GTP-Rho";  // hasPart CHEBI:35224; hasPart PR:000000122

  // Reactions:
  re1: GEF => Active_GEF; default*Function_for_re1(default, k1, Activator, GEF);  // modifiers: Activator; ncit:C64382
    k1 = 1;
  re2: Active_GEF => GEF; default*Function_for_re2(default, k2, Active_GEF);
    k2 = 0.1;
  re3: Activator => Degrade; default*Function_for_re3(default, k3, Activator);
    k3 = 0.5;
  re4: GDP_Rho => GTP_Rho; default*Function_for_re4(KmGEFGDI, KmGEFRho, default, kcatGEF, Active_GEF, GDP_Rho, GDI);  // modifiers: Active_GEF, GDI
    KmGEFGDI = 1; KmGEFRho = 24.5; kcatGEF = 5.64;
  re5: GTP_Rho => GDP_Rho; default*Function_for_re5(KmGAPGDI, KmGAPRho, default, kcatGAP, GTP_Rho, GDI, GAP);  // modifiers: GAP, GDI; ncit:C16702
    KmGAPGDI = 0.1; KmGAPRho = 4.48; kcatGAP = 95.9;
  re6: GDP_Rho + GDI -> GDI_GDP_Rho; default*Function_for_re6(default, k4, k5, GDI_GDP_Rho, GDP_Rho, GDI);
    k4 = 0.5; k5 = 0.05;
  re7: GDI + GTP_Rho -> GDI_GTP_Rho; default*Function_for_re7(default, k6, k7, GDI_GTP_Rho, GTP_Rho, GDI);
    k6 = 0.5; k7 = 0.05;
  re8: GTP_Rho + Effector -> Effector_GTP_Rho; default*Function_for_re8(default, k8, k9, Effector_GTP_Rho, GTP_Rho, Effector);
    k8 = 28.2; k9 = 0.18;

  // Unit definitions:
  unit time = 60 second;
  unit substance = 1e-6 mole;
end
