// SBML level 2 version 4

function Ligand_Binding_1(k, R, L)
  4*k*R*L;
end

function Ligand_Binding_2(k, R, L)
  3*k*R*L;
end

function Ligand_Binding_3(k, R, L)
  2*k*R*L;
end

function Ligand_Binding_4(k, R, L)
  k*R*L;
end

function Ligand_Unbinding_1(k, R)
  k*R;
end

function Ligand_Unbinding_2(k, R)
  2*k*R;
end

function Ligand_Unbinding_3(k, R)
  3*k*R;
end

function Ligand_Unbinding_4(k, R)
  4*k*R;
end

model MODEL1407160000()
  // Dutta-Roy2015 - Opening of the multiple AMPA receptor conductance states
  // This model is described in the article:
  // Ligand-dependent opening of the multiple AMPA receptor conductance States: a concerted model.
  // Dutta-Roy R, Rosenmund C, Edelstein SJ, Le Novère N.
  // PLoS ONE 2015; 10(1): e0116616
  // Abstract:
  // Modulation of the properties of AMPA receptors at the post-synaptic membrane is one of the main suggested mechanisms underlying fast synaptic transmission in the central nervous system of vertebrates. Electrophysiological recordings of single channels stimulated with agonists showed that both recombinant and native AMPA receptors visit multiple conductance states in an agonist concentration dependent manner. We propose an allosteric model of the multiple conductance states based on concerted conformational transitions of the four subunits, as an iris diaphragm. Our model predicts that the thermodynamic behaviour of the conductance states upon full and partial agonist stimulations can be described with increased affinity of receptors as they progress to higher conductance states. The model also predicts the existence of AMPA receptors in non-liganded conductive substates. However, the probability of spontaneous openings decreases with increasing conductances. Finally, we predict that the large conductance states are stabilized within the rise phase of a whole-cell EPSC in glutamatergic hippocampal neurons. Our model provides a mechanistic link between ligand concentration and conductance states that can explain thermodynamic and kinetic features of AMPA receptor gating.
  // This model is hosted on BioModels Database and identified by: BIOMD0000000569.
  // To cite BioModels Database, please use: BioModels Database: An enhanced, curated and annotated resource for published quantitative kinetic models.
  // To the extent possible under law, all copyright and related or neighbouring rights to this encoded model have been dedicated to the public domain worldwide. Please refer to CC0 Public Domain Dedication for more information.
  // biomodels.db:MODEL1407160000
  // biomodels.db:BIOMD0000000569
  // isDescribedBy pubmed:25629405
  // isVersionOf GO:0004971
  // hasTaxon taxonomy:9606
  // hasProperty mamo:MAMO_0000046

  // Compartments:
  // The volume must be divided by 50 (resulting in 2e-18 litre) to simulate a single receptor while keeping the same concentration.
  compartment synapse = 1e-16;  // FMA:55675

  // Species:
  // The amount must be divided by 50 to simulate a single receptor (scale down the volume too).
  species B0 in synapse = 8.302694e-7;  // hasPart uniprot:Q13002; hasPart uniprot:P42263
  species S0 in synapse = 0;
  species B1 in synapse = 0;
  species S1 in synapse = 0;
  species B2 in synapse = 0;
  species S2 in synapse = 0;
  species B3 in synapse = 0;
  species S3 in synapse = 0;
  species B4 in synapse = 0;
  species S4 in synapse = 0;
  species M0 in synapse = 0;
  species M1 in synapse = 0;
  species M2 in synapse = 0;
  species M3 in synapse = 0;
  species M4 in synapse = 0;
  species L0 in synapse = 0;
  species L1 in synapse = 0;
  species L2 in synapse = 0;
  species L3 in synapse = 0;
  species L4 in synapse = 0;
  species glu in synapse = 0.0008302694;  // CHEBI:18237

  // Parameters:
  Bkon = 5000000;
  Bkoff = 4495;
  Skon = 5000000;
  Skoff = 270.4;
  Mkon = 5000000;
  Mkoff = 16.65;
  Lkon = 5000000;
  Lkoff = 1.149;
  BSk0 = BSk1*BSc^p;
  SBk0 = SBk1/BSc^p;
  BSk1 = BSk2*BSc^p;
  SBk1 = SBk2/BSc^p;
  BSk2 = BSk3*BSc^p;
  SBk2 = SBk3/BSc^p;
  BSk3 = BSk4*BSc^p;
  SBk3 = SBk4/BSc^p;
  BSk4 = 300000;
  SBk4 = 860;
  SMk0 = SMk1*SMc^p;
  MSk0 = MSk1/SMc^p;
  SMk1 = SMk2*SMc^p;
  MSk1 = MSk2/SMc^p;
  SMk2 = SMk3*SMc^p;
  MSk2 = MSk3/SMc^p;
  SMk3 = SMk4*SMc^p;
  MSk3 = MSk4/SMc^p;
  SMk4 = 20000;
  MSk4 = 145;
  MLk0 = MLk1*MLc^p;
  LMk0 = LMk1/MLc^p;
  MLk1 = MLk2*MLc^p;
  LMk1 = LMk2/MLc^p;
  MLk2 = MLk3*MLc^p;
  LMk2 = LMk3/MLc^p;
  MLk3 = MLk4*MLc^p;
  LMk3 = LMk4/MLc^p;
  MLk4 = 50000;
  LMk4 = 691;
  BSc = 0.0601;
  SMc = 0.0616;
  MLc = 0.069;
  p = 0.5;

  // Reactions:
  B0____S0: B0 => S0; synapse*BSk0*B0; B0____S0 is "B0 -> S0";
  S0____B0: S0 => B0; synapse*SBk0*S0; S0____B0 is "S0 -> B0";
  B1____S1: B1 => S1; synapse*BSk1*B1; B1____S1 is "B1 -> S1";
  S1____B1: S1 => B1; synapse*SBk1*S1; S1____B1 is "S1 -> B1";
  B2____S2: B2 => S2; synapse*BSk2*B2; B2____S2 is "B2 -> S2";
  S2____B2: S2 => B2; synapse*SBk2*S2; S2____B2 is "S2 -> B2";
  B3____S3: B3 => S3; synapse*BSk3*B3; B3____S3 is "B3 -> S3";
  S3____B3: S3 => B3; synapse*SBk3*S3; S3____B3 is "S3 -> B3";
  B4____S4: B4 => S4; synapse*BSk4*B4; B4____S4 is "B4 -> S4";
  S4____B4: S4 => B4; synapse*SBk4*S4; S4____B4 is "S4 -> B4";
  S0____M0: S0 => M0; synapse*SMk0*S0; S0____M0 is "S0 -> M0";
  M0____S0: M0 => S0; synapse*MSk0*M0; M0____S0 is "M0 -> S0";
  S1____M1: S1 => M1; synapse*SMk1*S1; S1____M1 is "S1 -> M1";
  M1____S1: M1 => S1; synapse*MSk1*M1; M1____S1 is "M1 -> S1";
  S2____M2: S2 => M2; synapse*SMk2*S2; S2____M2 is "S2 -> M2";
  M2____S2: M2 => S2; synapse*MSk2*M2; M2____S2 is "M2 -> S2";
  S3____M3: S3 => M3; synapse*SMk3*S3; S3____M3 is "S3 -> M3";
  M3____S3: M3 => S3; synapse*MSk3*M3; M3____S3 is "M3 -> S3";
  S4____M4: S4 => M4; synapse*SMk4*S4; S4____M4 is "S4 -> M4";
  M4____S4: M4 => S4; synapse*MSk4*M4; M4____S4 is "M4 -> S4";
  M0____L0: M0 => L0; synapse*MLk0*M0; M0____L0 is "M0 -> L0";
  L0____M0: L0 => M0; synapse*LMk0*L0; L0____M0 is "L0 -> M0";
  M1____L1: M1 => L1; synapse*MLk1*M1; M1____L1 is "M1 -> L1";
  L1____M1: L1 => M1; synapse*LMk1*L1; L1____M1 is "L1 -> M1";
  M2____L2: M2 => L2; synapse*MLk2*M2; M2____L2 is "M2 -> L2";
  L2____M2: L2 => M2; synapse*LMk2*L2; L2____M2 is "L2 -> M2";
  M3____L3: M3 => L3; synapse*MLk3*M3; M3____L3 is "M3 -> L3";
  L3____M3: L3 => M3; synapse*LMk3*L3; L3____M3 is "L3 -> M3";
  M4____L4: M4 => L4; synapse*MLk4*M4; M4____L4 is "M4 -> L4";
  L4____M4: L4 => M4; synapse*LMk4*L4; L4____M4 is "L4 -> M4";
  B0____B1: B0 + glu => B1; synapse*Ligand_Binding_1(Bkon, B0, glu); B0____B1 is "B0 -> B1";
  B1____B0: B1 => B0 + glu; synapse*Ligand_Unbinding_1(Bkoff, B1); B1____B0 is "B1 -> B0";
  B1____B2: B1 + glu => B2; synapse*Ligand_Binding_2(Bkon, B1, glu); B1____B2 is "B1 -> B2";
  B2____B1: B2 => B1 + glu; synapse*Ligand_Unbinding_2(Bkoff, B2); B2____B1 is "B2 -> B1";
  B2____B3: B2 + glu => B3; synapse*Ligand_Binding_3(Bkon, B2, glu); B2____B3 is "B2 -> B3";
  B3____B2: B3 => B2 + glu; synapse*Ligand_Unbinding_3(Bkoff, B3); B3____B2 is "B3 -> B2";
  B3____B4: B3 + glu => B4; synapse*Ligand_Binding_4(Bkon, B3, glu); B3____B4 is "B3 -> B4";
  B4____B3: B4 => B3 + glu; synapse*Ligand_Unbinding_4(Bkoff, B4); B4____B3 is "B4 -> B3";
  S0____S1: S0 + glu => S1; synapse*Ligand_Binding_1(Skon, S0, glu); S0____S1 is "S0 -> S1";
  S1____S0: S1 => S0 + glu; synapse*Ligand_Unbinding_1(Skoff, S1); S1____S0 is "S1 -> S0";
  S1____S2: S1 + glu => S2; synapse*Ligand_Binding_2(Skon, S1, glu); S1____S2 is "S1 -> S2";
  S2____S1: S2 => S1 + glu; synapse*Ligand_Unbinding_2(Skoff, S2); S2____S1 is "S2 -> S1";
  S2____S3: S2 + glu => S3; synapse*Ligand_Binding_3(Skon, S2, glu); S2____S3 is "S2 -> S3";
  S3____S2: S3 => S2 + glu; synapse*Ligand_Unbinding_3(Skoff, S3); S3____S2 is "S3 -> S2";
  S3____S4: S3 + glu => S4; synapse*Ligand_Binding_4(Skon, S3, glu); S3____S4 is "S3 -> S4";
  S4____S3: S4 => S3 + glu; synapse*Ligand_Unbinding_4(Skoff, S4); S4____S3 is "S4 -> S3";
  M0____M1: M0 + glu => M1; synapse*Ligand_Binding_1(Mkon, M0, glu); M0____M1 is "M0 -> M1";
  M1____M0: M1 => M0 + glu; synapse*Ligand_Unbinding_1(Mkoff, M1); M1____M0 is "M1 -> M0";
  M1____M2: M1 + glu => M2; synapse*Ligand_Binding_2(Mkon, M1, glu); M1____M2 is "M1 -> M2";
  M2____M1: M2 => M1 + glu; synapse*Ligand_Unbinding_2(Mkoff, M2); M2____M1 is "M2 -> M1";
  M2____M3: M2 + glu => M3; synapse*Ligand_Binding_3(Mkon, M2, glu); M2____M3 is "M2 -> M3";
  M3____M2: M3 => M2 + glu; synapse*Ligand_Unbinding_3(Mkoff, M3); M3____M2 is "M3 -> M2";
  M3____M4: M3 + glu => M4; synapse*Ligand_Unbinding_4(Mkon, M3); M3____M4 is "M3 -> M4";
  M4____M3: M4 => M3 + glu; synapse*Ligand_Unbinding_4(Mkoff, M4); M4____M3 is "M4 -> M3";
  L0____L1: L0 + glu => L1; synapse*Ligand_Binding_1(Lkon, L0, glu); L0____L1 is "L0 -> L1";
  L1____L0: L1 => L0 + glu; synapse*Ligand_Unbinding_1(Lkoff, L1); L1____L0 is "L1 -> L0";
  L1____L2: L1 + glu => L2; synapse*Ligand_Binding_2(Lkon, L1, glu); L1____L2 is "L1 -> L2";
  L2____L1: L2 => L1 + glu; synapse*Ligand_Unbinding_2(Lkoff, L2); L2____L1 is "L2 -> L1";
  L2____L3: L2 + glu => L3; synapse*Ligand_Binding_3(Lkon, L2, glu); L2____L3 is "L2 -> L3";
  L3____L2: L3 => L2 + glu; synapse*Ligand_Unbinding_3(Lkoff, L3); L3____L2 is "L3 -> L2";
  L3____L4: L3 + glu => L4; synapse*Ligand_Binding_4(Lkon, L3, glu); L3____L4 is "L3 -> L4";
  L4____L3: L4 => L3 + glu; synapse*Ligand_Unbinding_4(Lkoff, L4); L4____L3 is "L4 -> L3";
end
