// SBML level 2 version 4
// dcterms:bibliographicCitation: urn:miriam:pubmed:26367386

function CWP_Logistic_1(k, r, s18)
  r*s18*(1 - s18/k);
end

function _1_2_MA_1(k, s34)
  k*s34/2;
end
_1_2_MA_1 is "1/2 MA_1";

function CWP_Hill_Inhibitor_2(TFa, TFi, ka, ki, n)
  ka*TFa*(1/(1 + (TFi/ki)^n));
end

function CWP_hill_4(NOD1, n, shalve, vmax)
  vmax*NOD1^n/(shalve^n + NOD1^n);
end

function CWP_Hill_Inhibitor_3(RIG, ka, ki, n, s49)
  ka*RIG*(1/(1 + (s49/ki)^n));
end

function CWP_hill_5(MAVS, n, shalve, vmax)
  vmax*MAVS^n/(shalve^n + MAVS^n);
end

function CWP_hill_6(IFN, n, shalve, vmax)
  vmax*IFN^n/(shalve^n + IFN^n);
end

function CWP_hill_7(IRF, n, shalve, vmax)
  vmax*IRF^n/(shalve^n + IRF^n);
end

function _1_2_MA_2(IFN, k)
  k*IFN/2;
end
_1_2_MA_2 is "1/2 MA_2";

function CWP_Hill_Inhibitor_1(ka, ki, n, s49, s7)
  ka*s7*(1/(1 + (s49/ki)^n));
end

function CWP_hill_1(n, s18, shalve, vmax)
  vmax*s18^n/(shalve^n + s18^n);
end

function CWP_hill_2(n, s4, shalve, vmax)
  vmax*s4^n/(shalve^n + s4^n);
end

function CWP_hill_3(n, s34, shalve, vmax)
  vmax*s34^n/(shalve^n + s34^n);
end

function CWP_Hill_Inhibitor_4(X, ka, ki, n, s51)
  ka*s51*(1/(1 + (X/ki)^n));
end

function CWP_hill_8(CytoE, n, shalve, vmax)
  vmax*CytoE^n/(shalve^n + CytoE^n);
end

function CWP_Hill_Inhibitor_5(X, ka, ki, n, s4)
  ka*s4*(1/(1 + (X/ki)^n));
end

function _1_2_MA_3(CytoE, k)
  k*CytoE/2;
end
_1_2_MA_3 is "1/2 MA_3";

model Philipson2015___Innate_immune_response_modulated_by_NLRX1()
  // Philipson2015 - Innate immune response modulated by NLRX1
  // biomodels.db:MODEL1508180000
  // biomodels.db:BIOMD0000000596
  // occursIn BTO:0000141
  // hasProperty DOID:3686
  // hasProperty mamo:MAMO_0000046
  // hasProperty GO:0044403

  // Compartments:
  compartment default = 1;  // isVersionOf ncit:C26055

  // Species:
  species HP in default = 4.4;  // isVersionOf ncit:C14289
  species NLRX1 in default = 0.9;  // isVersionOf uniprot:Q86UT6
  species CytoL in default = 1;  // isVersionOf ncit:C20464
  species MyD88 in default = 0.9;  // isVersionOf uniprot:Q99836
  species TRAF6 in default = 0.9;  // isVersionOf uniprot:Q9Y4K3
  species NFkB in default = 0.9;  // isVersionOf ncit:C17380
  species IFN in default = 1;  // isVersionOf ncit:C20493
  species NOD1 in default = 0.9;  // isVersionOf uniprot:Q9Y239
  species RIG in default = 0.9;
  species MAVS in default = 0.6;
  species IRF in default = 1;  // hasVersion uniprot:Q14653; hasVersion uniprot:Q92985
  species TFa in default = 1;  // isVersionOf ncit:C17207
  species CytoE in default = 1;  // isVersionOf ncim:C20464
  species TFi in default = 1;  // isVersionOf ncit:C17207
  species X in default = 1;

  // Parameters:
  n = 1 unit_0;  // isVersionOf ncit:C48923

  // Reactions:
  MyD88_a_HP: => MyD88; default*CWP_hill_1(n, HP, MyD88_a_HP_shalve, MyD88_a_HP_vmax);  // modifiers: HP
    MyD88_a_HP_shalve = 0.00167454; MyD88_a_HP_vmax = 0.00211822;
  MyD88_d: MyD88 => ; default*MyD88_d_k1*MyD88;
    MyD88_d_k1 = 0.00123453;
  TRAF_d: TRAF6 => ; default*TRAF_d_k1*TRAF6;
    TRAF_d_k1 = 0.0103771;
  NFkB_a1: => NFkB; default*CWP_Hill_Inhibitor_1(NFkB_a1_ka, NFkB_a1_ki, n, NLRX1, TRAF6);  // modifiers: NLRX1, TRAF6
    NFkB_a1_ka = 1.16764; NFkB_a1_ki = 0.0477912;
  NFkB_d: NFkB => ; default*NFkB_d_k1*NFkB;
    NFkB_d_k1 = 0.0750704;
  CytoL_a: => CytoL; default*CWP_hill_2(n, NFkB, CytoL_a_shalve, CytoL_a_vmax);  // modifiers: NFkB
    CytoL_a_shalve = 0.00405; CytoL_a_vmax = 0.096005;
  CytoL_d: CytoL => ; default*CytoL_d_k1*CytoL;
    CytoL_d_k1 = 0.00608;
  NLRX1_d: NLRX1 => ; default*NLRX1_d_k1*NLRX1;
    NLRX1_d_k1 = 0.00593;
  MyD88_a: => MyD88; default*CWP_hill_3(n, CytoL, MyD88_a_shalve, MyD88_a_vmax);  // modifiers: CytoL
    MyD88_a_shalve = 0.00154977; MyD88_a_vmax = 0.00283798;
  HP_a: => HP; default*CWP_Logistic_1(HP_a_k, r, HP);
    HP_a_k = 6.47754; r = 0.0231262;
  HP_CytoL: HP => ; default*_1_2_MA_1(HP_CytoL_k, CytoL);  // modifiers: CytoL
    HP_CytoL_k = 0.00457697;
  NLRX1_TF: => NLRX1; default*CWP_Hill_Inhibitor_2(TFa, TFi, NLRX1_TF_ka, NLRX1_TF_ki, n);  // modifiers: TFi, TFa
    NLRX1_TF_ka = 0.42313; NLRX1_TF_ki = 0.008882;
  NFkB_a2: => NFkB; default*CWP_hill_4(NOD1, n, NFkB_a2_shalve, NFkB_a2_vmax);  // modifiers: NOD1
    NFkB_a2_shalve = 1.88462; NFkB_a2_vmax = 0.634738;
  RIG_a_HP: => RIG; default*CWP_hill_1(n, HP, RIG_a_HP_shalve, RIG_a_HP_vmax);  // modifiers: HP
    RIG_a_HP_shalve = 0.0014314; RIG_a_HP_vmax = 0.0118174;
  RIG_d: RIG => ; default*RIG_d_k1*RIG;
    RIG_d_k1 = 0.00103772;
  MAVS_a: => MAVS; default*CWP_Hill_Inhibitor_3(RIG, MAVS_a_ka, MAVS_a_ki, n, NLRX1);  // modifiers: NLRX1, RIG
    MAVS_a_ka = 0.00747772; MAVS_a_ki = 0.0334969;
  MAVS_d: MAVS => ; default*MAVS_d_k1*MAVS;
    MAVS_d_k1 = 0.001592;
  IRF_a1: => IRF; default*CWP_hill_5(MAVS, n, IRF_a1_shalve, IRF_a1_vmax);  // modifiers: MAVS
    IRF_a1_shalve = 1.44358; IRF_a1_vmax = 0.0062174;
  IRF_a2: => IRF; default*CWP_hill_4(NOD1, n, IRF_a2_shalve, IRF_a2_vmax);  // modifiers: NOD1
    IRF_a2_shalve = 9.6499; IRF_a2_vmax = 0.0980063;
  IRF_a3: => IRF; default*CWP_hill_6(IFN, n, IRF_a3_shalve, IRF_a3_vmax);  // modifiers: IFN
    IRF_a3_shalve = 44.7674; IRF_a3_vmax = 0.301374;
  IRF_d: IRF => ; default*IRF_d_k1*IRF;
    IRF_d_k1 = 0.00478922;
  IFN_a: => IFN; default*CWP_hill_7(IRF, n, IFN_a_shalve, IFN_a_vmax);  // modifiers: IRF
    IFN_a_shalve = 49.9288; IFN_a_vmax = 0.489838;
  IFN_d: IFN => ; default*IFN_d_k1*IFN;
    IFN_d_k1 = 0.00523856;
  NOD_a: => NOD1; default*CWP_hill_1(n, HP, NOD_a_shalve, NOD_a_vmax);  // modifiers: HP
    NOD_a_shalve = 0.00178531; NOD_a_vmax = 0.0066234;
  NOD_d: NOD1 => ; default*NOD_d_k1*NOD1;
    NOD_d_k1 = 0.00122637;
  HP_IFN: HP => ; default*_1_2_MA_2(IFN, HP_IFN_k);  // modifiers: IFN
    HP_IFN_k = 1e-5;
  TRAF_a: => TRAF6; default*CWP_Hill_Inhibitor_4(X, TRAF_a_ka, TRAF_a_ki, n, MyD88);  // modifiers: X, MyD88
    TRAF_a_ka = 0.739178; TRAF_a_ki = 0.0881285;
  TFa_a: => TFa; default*CWP_hill_3(n, CytoL, TFa_a_shalve, TFa_a_vmax);  // modifiers: CytoL
    TFa_a_shalve = 0.798454; TFa_a_vmax = 0.0205163;
  TFa_d: TFa => ; default*TFa_d_k1*TFa;
    TFa_d_k1 = 0.00830409;
  TFi_a: => TFi; default*CWP_hill_8(CytoE, n, TFi_a_shalve, TFi_a_vmax);  // modifiers: CytoE
    TFi_a_shalve = 3.08354; TFi_a_vmax = 0.0902778;
  TFi_d: TFi => ; default*TFi_d_k1*TFi;
    TFi_d_k1 = 0.032462;
  CytoE_a: => CytoE; default*CWP_Hill_Inhibitor_5(X, CytoE_a_ka, CytoE_a_ki, n, NFkB);  // modifiers: X, NFkB
    CytoE_a_ka = 12.2028; CytoE_a_ki = 0.0480683;
  CytoE_d: CytoE => ; default*CytoE_d_k1*CytoE;
    CytoE_d_k1 = 0.0367629;
  X_a: => X; default*CWP_hill_2(n, NFkB, X_a_shalve, X_a_vmax);  // modifiers: NFkB
    X_a_shalve = 0.003976; X_a_vmax = 0.0463933;
  X_d: X => ; default*X_d_k1*X;
    X_d_k1 = 0.00222793;
  HP_CytoE: HP => ; default*_1_2_MA_3(CytoE, HP_CytoE_k);  // modifiers: CytoE
    HP_CytoE_k = 0.00015;

  // Unit definitions:
  unit time = 60 second;
  unit substance = 1e-3 mole;
  unit unit_0 = dimensionless^0; unit_0 is "1";
end
