// SBML level 2 version 4
// dcterms:bibliographicCitation: urn:miriam:doi:10.1172/JCI57867

model MODEL1607270000()
  // Krohn2011 - Cerebral amyloid-β proteostasis regulated by membrane transport protein ABCC1
  // This model is described in the article:
  // Cerebral amyloid-β proteostasis is regulated by the membrane transport protein ABCC1 in mice.
  // Krohn M, Lange C, Hofrichter J, Scheffler K, Stenzel J, Steffen J, Schumacher T, Brüning T, Plath AS, Alfen F, Schmidt A, Winter F, Rateitschak K, Wree A, Gsponer J, Walker LC, Pahnke J.
  // J. Clin. Invest. 2011 Oct; 121(10): 3924-3931
  // Abstract:
  // In Alzheimer disease (AD), the intracerebral accumulation of amyloid-β (Aβ) peptides is a critical yet poorly understood process. Aβ clearance via the blood-brain barrier is reduced by approximately 30% in AD patients, but the underlying mechanisms remain elusive. ABC transporters have been implicated in the regulation of Aβ levels in the brain. Using a mouse model of AD in which the animals were further genetically modified to lack specific ABC transporters, here we have shown that the transporter ABCC1 has an important role in cerebral Aβ clearance and accumulation. Deficiency of ABCC1 substantially increased cerebral Aβ levels without altering the expression of most enzymes that would favor the production of Aβ from the Aβ precursor protein. In contrast, activation of ABCC1 using thiethylperazine (a drug approved by the FDA to relieve nausea and vomiting) markedly reduced Aβ load in a mouse model of AD expressing ABCC1 but not in such mice lacking ABCC1. Thus, by altering the temporal aggregation profile of Aβ, pharmacological activation of ABC transporters could impede the neurodegenerative cascade that culminates in the dementia of AD.
  // This model is hosted on BioModels Database and identified by: BIOMD0000000618.
  // To cite BioModels Database, please use: BioModels Database: An enhanced, curated and annotated resource for published quantitative kinetic models.
  // To the extent possible under law, all copyright and related or neighbouring rights to this encoded model have been dedicated to the public domain worldwide. Please refer to CC0 Public Domain Dedication for more information.
  // biomodels.db:MODEL1607270000
  // biomodels.db:BIOMD0000000618
  // isDescribedBy pubmed:21881209
  // isVersionOf GO:1990000
  // isVersionOf GO:0006810
  // hasProperty mamo:MAMO_0000046

  // Compartments:
  compartment Brain = 1;  // BTO:0000142

  // Species:
  // amyloid-β monomers
  species $M in Brain = 1.0439;  // isVersionOf CHEBI:64645
  species $N in Brain = 0;
  species $A7 in Brain = 0;
  species $A8 in Brain = 0;
  species $A9 in Brain = 0;
  species $A10 in Brain = 0;
  species $A11 in Brain = 0;
  species $A12 in Brain = 0;
  species $A13 in Brain = 0;
  species $A14 in Brain = 0;
  species $A15 in Brain = 0;
  species $A16 in Brain = 0;
  species $A17 in Brain = 0;
  species $A18 in Brain = 0;
  species $A19 in Brain = 0;
  species $A20 in Brain = 0;
  species $A21 in Brain = 0;
  species $A22 in Brain = 0;
  species $A23 in Brain = 0;
  species $A24 in Brain = 0;
  species $A25 in Brain = 0;
  species $A26 in Brain = 0;
  species $A27 in Brain = 0;
  species $A28 in Brain = 0;
  species $A29 in Brain = 0;
  species $A30 in Brain = 0;
  species $A31 in Brain = 0;
  species $A32 in Brain = 0;
  species $A33 in Brain = 0;
  species $A34 in Brain = 0;
  species $A35 in Brain = 0;
  species $A36 in Brain = 0;
  species $A37 in Brain = 0;
  species $A38 in Brain = 0;
  species $A39 in Brain = 0;
  species $A40 in Brain = 0;
  species $A41 in Brain = 0;
  species $A42 in Brain = 0;
  species $A43 in Brain = 0;
  species $A44 in Brain = 0;
  species $A45 in Brain = 0;
  species $A46 in Brain = 0;
  species $A47 in Brain = 0;
  species $A48 in Brain = 0;
  species $A49 in Brain = 0;
  species $A50 in Brain = 0;
  species $A51 in Brain = 0;
  species $A52 in Brain = 0;
  species $A53 in Brain = 0;
  species $A54 in Brain = 0;
  species $soluble_obs in Brain;
  species $insoluble_obs in Brain;

  // Parameters:
  // constant production rate of monomeric amyloid beta
  P = 91.239;
  // initial transporter capacity
  c_T = 82.419;
  // shape parameter for transport inhibition
  s_T = 17.744;
  // shape parameter of the transport inhibition
  e_T = 7.8115;
  // rate constant for the nucleation of amyloid beta
  k_n = 0.34508;
  // rate constant for aggregation in the pool of soluble amyloid beta
  k_sol = 0.34237;
  // rate constant for aggregation in the pool of insoluble amyloid beta
  k_insol = 0.3586;
  // number of amyloid beta monomers in the nucleus
  n_n = 6;

  // Assignment rules:
  R_T := c_T*M;
  insoluble := A15*15 + A16*16 + 17*A17 + 18*A18 + 19*A19 + 20*A20 + 21*A21 + 22*A22 + 23*A23 + 24*A24 + 25*A25 + 26*A26 + 27*A27 + 28*A28 + 29*A29 + 30*A30 + 31*A31 + 32*A32 + 33*A33 + 34*A34 + 35*A35 + 36*A36 + 37*A37 + 38*A38 + 39*A39 + 40*A40 + 41*A41 + 42*A42 + 43*A43 + 44*A44 + 45*A45 + 46*A46 + 47*A47 + 48*A48 + 49*A49 + 50*A50 + 51*A51 + 52*A52 + 53*A53 + 54*A54;
  soluble := M + N*n_n + 7*A7 + 8*A8 + 9*A9 + 10*A10 + 11*A11 + 12*A12 + 13*A13 + 14*A14;
  blocking := A15 + A16 + A17 + A18 + A19 + A20 + A21 + A22 + A23 + A24 + A25 + A26 + A27 + A28 + A29 + A30 + A31 + A32 + A33 + A34 + A35 + A36 + A37 + A38 + A39 + A40 + A41 + A42 + A43 + A44 + A45 + A46 + A47 + A48 + A49 + A50 + A51 + A52 + A53 + A54;
  a_T := R_T*(s_T^e_T/(s_T^e_T + blocking^e_T));
  I_net := P - a_T;
  insoluble_obs := insoluble;
  soluble_obs := soluble;

  // Rate rules:
  M' = I_net - k_n*n_n*M^n_n - k_sol*N*M - k_sol*A7*M - k_sol*A8*M - k_sol*A9*M - k_sol*A10*M - k_sol*A11*M - k_sol*A12*M - k_sol*A13*M - k_insol*A14*M - k_insol*A15*M - k_insol*A16*M - k_insol*A17*M - k_insol*A18*M - k_insol*A19*M - k_insol*A20*M - k_insol*A21*M - k_insol*A22*M - k_insol*A23*M - k_insol*A24*M - k_insol*A25*M - k_insol*A26*M - k_insol*A27*M - k_insol*A28*M - k_insol*A29*M - k_insol*A30*M - k_insol*A31*M - k_insol*A32*M - k_insol*A33*M - k_insol*A34*M - k_insol*A35*M - k_insol*A36*M - k_insol*A37*M - k_insol*A38*M - k_insol*A39*M - k_insol*A40*M - k_insol*A41*M - k_insol*A42*M - k_insol*A43*M - k_insol*A44*M - k_insol*A45*M - k_insol*A46*M - k_insol*A47*M - k_insol*A48*M - k_insol*A49*M - k_insol*A50*M - k_insol*A51*M - k_insol*A52*M - k_insol*A53*M;
  N' = k_n*M^n_n - k_sol*N*M;
  A7' = k_sol*N*M - k_sol*A7*M;
  A8' = k_sol*A7*M - k_sol*A8*M;
  A9' = k_sol*A8*M - k_sol*A9*M;
  A10' = k_sol*A9*M - k_sol*A10*M;
  A11' = k_sol*A10*M - k_sol*A11*M;
  A12' = k_sol*A11*M - k_sol*A12*M;
  A13' = k_sol*A12*M - k_sol*A13*M;
  A14' = k_sol*A13*M - k_insol*A14*M;
  A15' = k_insol*A14*M - k_insol*A15*M;
  A16' = k_insol*A15*M - k_insol*A16*M;
  A17' = k_insol*A16*M - k_insol*A17*M;
  A18' = k_insol*A17*M - k_insol*A18*M;
  A19' = k_insol*A18*M - k_insol*A19*M;
  A20' = k_insol*A19*M - k_insol*A20*M;
  A21' = k_insol*A20*M - k_insol*A21*M;
  A22' = k_insol*A21*M - k_insol*A22*M;
  A23' = k_insol*A22*M - k_insol*A23*M;
  A24' = k_insol*A23*M - k_insol*A24*M;
  A25' = k_insol*A24*M - k_insol*A25*M;
  A26' = k_insol*A25*M - k_insol*A26*M;
  A27' = k_insol*A26*M - k_insol*A27*M;
  A28' = k_insol*A27*M - k_insol*A28*M;
  A29' = k_insol*A28*M - k_insol*A29*M;
  A30' = k_insol*A29*M - k_insol*A30*M;
  A31' = k_insol*A30*M - k_insol*A31*M;
  A32' = k_insol*A31*M - k_insol*A32*M;
  A33' = k_insol*A32*M - k_insol*A33*M;
  A34' = k_insol*A33*M - k_insol*A34*M;
  A35' = k_insol*A34*M - k_insol*A35*M;
  A36' = k_insol*A35*M - k_insol*A36*M;
  A37' = k_insol*A36*M - k_insol*A37*M;
  A38' = k_insol*A37*M - k_insol*A38*M;
  A39' = k_insol*A38*M - k_insol*A39*M;
  A40' = k_insol*A39*M - k_insol*A40*M;
  A41' = k_insol*A40*M - k_insol*A41*M;
  A42' = k_insol*A41*M - k_insol*A42*M;
  A43' = k_insol*A42*M - k_insol*A43*M;
  A44' = k_insol*A43*M - k_insol*A44*M;
  A45' = k_insol*A44*M - k_insol*A45*M;
  A46' = k_insol*A45*M - k_insol*A46*M;
  A47' = k_insol*A46*M - k_insol*A47*M;
  A48' = k_insol*A47*M - k_insol*A48*M;
  A49' = k_insol*A48*M - k_insol*A49*M;
  A50' = k_insol*A49*M - k_insol*A50*M;
  A51' = k_insol*A50*M - k_insol*A51*M;
  A52' = k_insol*A51*M - k_insol*A52*M;
  A53' = k_insol*A52*M - k_insol*A53*M;
  A54' = k_insol*A53*M;
end
