// SBML level 3 version 2
// dcterms:bibliographicCitation: http://identifiers.org/pubmed/22051568

function equation_for_Tumor_Growth_1(P, Tumorcells, gamma, gamma1, m)
  Tumorcells/((1/gamma1)^P + (Tumorcells^(1 - m)/gamma)^P)^(1/P);
end

function equation_for_Tumor_Kill_1(S1, TGFb, Tx, func_CD8_ETC, func_TRegs, k2, k3, r0)
  r0*Tx/(1 + k2*(Tx/func_CD8_ETC))*(1/((1 + k3*(func_TRegs/func_CD8_ETC))*(1 + TGFb/S1)));
end

function equation_for_unlicensed_DC_production_1(I1, IL10, R1, Tx, alpha, func_TRegs)
  alpha*Tx/((1 + IL10/I1)*(1 + func_TRegs/R1));
end

function equation_for_Dendritic_cell_licensing_1(Mh, lambda, ul_DC)
  lambda*ul_DC/(1 + ul_DC/Mh);
end

function equation_for_IL2_production_1(I2, IL10, S4, TGFb, pc, sl_CD4_HTC)
  pc*sl_CD4_HTC/((1 + TGFb/S4)*(1 + IL10/I2));
end

function equation_for_IL2_Degradation_1(IL2, tc)
  IL2/tc;
end

function equation_for_TGF_beta_Production_1(Tx, func_TRegs, p1, p2)
  p1*func_TRegs + p2*Tx;
end

function equation_for_TGF_beta_Degradation_1(TGFb, ts)
  TGFb/ts;
end

function equation_for_IL10_production_1(Tx, func_TRegs, p3, p4)
  p3*func_TRegs + p4*Tx;
end

function equation_for_IL10_degradation_1(IL10, t1)
  IL10/t1;
end

function equation_for_short_lived_CD8_production_1(M, Me, alpha1, k4, l_DC)
  alpha1*Me/(1 + k4*(M/l_DC));
end

function equation_for_fully_functional_CD8_production_1(C1, IL2, S2, TGFb, alpha2, sl_CD8_ETC)
  alpha2*sl_CD8_ETC*IL2/((1 + TGFb/S2)*(C1 + IL2));
end

function equation_for_short_lived_CD4_HTC_production_1(M, Mh, alpha3, k4, l_DC, ul_DC)
  alpha3*Mh/(1 + k4*(M/(ul_DC + l_DC)));
end

function equation_for_fully_functional_CD4_HTC_1(C1, IL2, S2, TGFb, alpha4, sl_CD4_HTC)
  alpha4*sl_CD4_HTC*IL2/((1 + TGFb/S2)*(C1 + IL2));
end

function equation_for_short_lived_TReg_production_1(M, Mr, alpha5, k4, l_DC)
  alpha5*Mr/(1 + k4*(M/l_DC));
end

function equation_for_fully_functional_TRegs_production_by_CD4_HTC_1(S3, TGFb, alpha7, func_CD4_HTC)
  alpha7*func_CD4_HTC*TGFb/(S3 + TGFb);
end

function equation_for_fully_functional_TRegs_production_by_sl_TRegs_1(C1, IL2, alpha6, sl_TRegs)
  alpha6*sl_TRegs*IL2/(C1 + IL2);
end

model Robertson_Tessi_M__2012()
  // Robertson-Tessi M 2012 A model of tumor Immune interaction
  // Its a mathematical model presenting the interaction between a growing tumor and immune system. Model involves tumor cells, dendritic cell, helper Tcells, regulatory Tcells, effector cells and certain cytokines (e.g. TGFbeta, IL10, IL2 ) produced by these cells. It represent a dynamic regulation of tumor production/killing by different immune cells and cytokines.
  // biomodels.db:MODEL1901250001 biomodels.db:BIOMD0000000731
  // hasPart ncit:C153548
  // isPropertyOf mamo:MAMO_0000046
  // hasTaxon taxonomy:9606
  // isDescribedBy pubmed:22051568
  // hasProperty mamo:MAMO_0000046
  // model units - substance: substance, time: time, volume: volume, area: area, length: metre, extent: substance

  // Compartments:
  // This compartment represent the microenvironment for tumor cells involving immune cells and cytokines produced from tumor/immune cells.
  compartment MISC = 1 volume; MISC is "TumorMicroenv";  // isVersionOf ncit:C94498

  // Species:
  species $Pool in MISC = 1; Pool is "Source";
  species Tumorcells in MISC = 1;  // isVersionOf EFO:0000616
  species $Sink in MISC = 1;
  species sl_CD8_ETC in MISC = 0; sl_CD8_ETC is "shortlived_CD8_ETC";  // isVersionOf BTO:0000289
  species func_CD8_ETC in MISC = 1e-5;  // isVersionOf BTO:0000289
  species sl_CD4_HTC in MISC = 0; sl_CD4_HTC is "shortlived_CD4_HTC";  // isVersionOf BTO:0002417
  species func_CD4_HTC in MISC = 0;  // isVersionOf BTO:0002417
  species sl_TRegs in MISC = 0; sl_TRegs is "shortlived_TRegs";  // isVersionOf BTO:0004520
  species ul_DC in MISC = 0; ul_DC is "unlicensed_DC";  // isVersionOf BTO:0002042
  // Concentration is in ng/ml
  species l_DC in MISC = 1e-5; l_DC is "licensed_DC";  // isVersionOf BTO:0002042
  species func_TRegs in MISC = 0;  // isVersionOf BTO:0004520
  species IL2 in MISC = 0;  // uniprot:P60568
  species TGFb in MISC = 0;  // isVersionOf uniprot:P01137
  species IL10 in MISC = 0;  // uniprot:P22301
  // Unit is number of Cells.
  species M in MISC = 10000000; M is "MemTcell";  // isVersionOf ncit:C104082
  // Unit is number of Cells and its 0.3 of M
  species Mh in MISC = 6000000; Mh is "MemHelperTcells";  // isVersionOf ncit:C12538
  // Unit is number of Cells and its 0.6 of M
  species Me in MISC = 3000000; Me is "MemEffectorCells";  // isVersionOf ncit:C126419
  // Unit is number of Cells and its 0.1 of M
  species Mr in MISC = 1000000; Mr is "RegMemTcell";  // isVersionOf ncit:C104082

  // Parameters:
  gamma = 333 unit_0;
  m = 0.5 unit_1;
  k1 = 100 unit_1;
  n = 0.6666 unit_1;
  P = 3 unit_1;
  deltaU = 0.14 unit_0;
  deltaD = 0.5 unit_0;
  deltaA = 0.2 unit_0;
  deltaE = 1 unit_0;
  deltaH = 0.1 unit_0;
  deltaR = 0.1 unit_0;
  k2 = 1.2 unit_1;
  // Unit is number of cells
  T1 = 1000000;
  var log_Tumor;
  var log_effector;
  var log_Treg;
  alpha = 6.31e-5 unit_0;
  r0 = 0.9 unit_0;
  k3 = 11 unit_1;
  S1 = 3.5 unit_2;
  alpha1 = 23 unit_0;
  k4 = 0.33 unit_1;
  lambda = 0.5 unit_0;
  I1 = 0.4 unit_2;
  alpha6 = 2.1 unit_0;
  alpha7 = 0.022 unit_0;
  // unit is ng/ml
  C1 = 0.3 unit_2;
  S2 = 2.9 unit_2;
  S3 = 1.7 unit_2;
  // Unit id ng/ml/day/cell
  pc = 1.7e-5;
  // Unit id ng/ml/day/cell
  p1 = 1.8e-8;
  // Unit id ng/ml/day/cell
  p2 = 1.1e-7;
  // Unit is number of cells
  R1 = 20000000;
  alpha2 = 16 unit_0;
  alpha3 = 9.9 unit_0;
  alpha4 = 1.9 unit_0;
  alpha5 = 5.1 unit_0;
  // Unit id ng/ml/day/cell
  p3 = 1.4e-8;
  // Unit id ng/ml/day/cell
  p4 = 1.3e-10;
  S4 = 0.9 unit_2;
  tc = 0.08 unit_3;
  ts = 0.07 unit_3;
  t1 = 0.05 unit_3;
  I2 = 0.75 unit_2;

  // Assignment rules:
  gamma1 := gamma*T1^(m - 1);
  Tx := Tumorcells/(1 + (Tumorcells^(1 - n)/k1)^P)^(1/P);
  log_Tumor := ln(max(1e-15, Tumorcells));
  log_effector := ln(func_CD8_ETC);
  log_Treg := ln(func_TRegs);
  Treg_origin_fraction_CD4 := func_TRegs_Production_from_CD4/max(1e-15, func_TRegs_Production_from_CD4 + func_TRegs_Production_from_sl_TRegs);
  Treg_origin_fraction_Treg := func_TRegs_Production_from_sl_TRegs/max(1e-15, func_TRegs_Production_from_CD4 + func_TRegs_Production_from_sl_TRegs);

  // Reactions:
  Tumor_Growth: $Pool => Tumorcells; MISC*equation_for_Tumor_Growth_1(P, Tumorcells, gamma, gamma1, m);
  Tumor_Cell_Killing: Tumorcells => $Sink; MISC*equation_for_Tumor_Kill_1(S1, TGFb, Tx, func_CD8_ETC, func_TRegs, k2, k3, r0);  // modifiers: func_CD8_ETC, func_TRegs, TGFb; hasProperty GO:0001906
  ul_DC_Production: $Pool => ul_DC; MISC*equation_for_unlicensed_DC_production_1(I1, IL10, R1, Tx, alpha, func_TRegs); ul_DC_Production is "unlicensed_DC Production";  // modifiers: IL10, func_TRegs
  Dendritic_Cell_Licensing: ul_DC => l_DC; MISC*equation_for_Dendritic_cell_licensing_1(Mh, lambda, ul_DC);  // modifiers: Mh
  sl_TRegs_Degradation: sl_TRegs => $Sink; MISC*deltaA*sl_TRegs; sl_TRegs_Degradation is "shortlived_TRegs Degradation";
  IL2_Production: $Pool => IL2; MISC*equation_for_IL2_production_1(I2, IL10, S4, TGFb, pc, sl_CD4_HTC);  // modifiers: sl_CD4_HTC, TGFb, IL10
  IL2_Degradation: IL2 => $Sink; MISC*equation_for_IL2_Degradation_1(IL2, tc);
  TGFb_Production: $Pool => TGFb; MISC*equation_for_TGF_beta_Production_1(Tx, func_TRegs, p1, p2);  // modifiers: func_TRegs, Tumorcells
  TGFb_Degradation: TGFb => $Sink; MISC*equation_for_TGF_beta_Degradation_1(TGFb, ts);
  IL10_Production: $Pool => IL10; MISC*equation_for_IL10_production_1(Tx, func_TRegs, p3, p4);  // modifiers: func_TRegs, Tumorcells
  IL10_Degradation: IL10 => $Sink; MISC*equation_for_IL10_degradation_1(IL10, t1);
  ul_DC_Degradation: ul_DC => $Sink; MISC*deltaU*ul_DC; ul_DC_Degradation is "unlicensed_DC Degradation";
  l_DC_Degradation: l_DC => $Sink; MISC*deltaD*l_DC; l_DC_Degradation is "licensed_DC Degradation";
  // ETC= Effector T cells
  sl_CD8_ETC_Production: $Pool => sl_CD8_ETC; MISC*equation_for_short_lived_CD8_production_1(M, Me, alpha1, k4, l_DC); sl_CD8_ETC_Production is "shortlived_CD8_ETC Production";  // modifiers: Me, M, l_DC
  sl_CD8_ETC_Degradation: sl_CD8_ETC => $Sink; MISC*deltaA*sl_CD8_ETC; sl_CD8_ETC_Degradation is "shortlived_CD8_ETC Degradation";
  func_CD8_ETC_Production: $Pool => func_CD8_ETC; MISC*equation_for_fully_functional_CD8_production_1(C1, IL2, S2, TGFb, alpha2, sl_CD8_ETC);  // modifiers: sl_CD8_ETC, IL2, TGFb
  func_CD8_ETC_Degradation: func_CD8_ETC => $Sink; MISC*deltaE*func_CD8_ETC;
  sl_CD4_HTC_Production: $Pool => sl_CD4_HTC; MISC*equation_for_short_lived_CD4_HTC_production_1(M, Mh, alpha3, k4, l_DC, ul_DC); sl_CD4_HTC_Production is "shortlived_CD4_HTC Production";  // modifiers: Mh, M, ul_DC, l_DC
  sl_CD4_HTC_Degradation: sl_CD4_HTC => $Sink; MISC*deltaA*sl_CD4_HTC; sl_CD4_HTC_Degradation is "shortlived_CD4_HTC Degradation";
  func_CD4_HTC_Production: $Pool => func_CD4_HTC; MISC*equation_for_fully_functional_CD4_HTC_1(C1, IL2, S2, TGFb, alpha4, sl_CD4_HTC);  // modifiers: sl_CD4_HTC, IL2, TGFb
  sl_TRegs_Production: $Pool => sl_TRegs; MISC*equation_for_short_lived_TReg_production_1(M, Mr, alpha5, k4, l_DC); sl_TRegs_Production is "shortlived_TRegs Production";  // modifiers: Mr, M, l_DC
  func_TRegs_Production_from_CD4: func_CD4_HTC => func_TRegs; MISC*equation_for_fully_functional_TRegs_production_by_CD4_HTC_1(S3, TGFb, alpha7, func_CD4_HTC);  // modifiers: TGFb
  func_CD4_HTC_Degradation: func_CD4_HTC => $Sink; MISC*deltaH*func_CD4_HTC;
  func_TRegs_Degradation: func_TRegs => $Sink; MISC*deltaR*func_TRegs;
  func_TRegs_Production_from_sl_TRegs: $Pool => func_TRegs; MISC*equation_for_fully_functional_TRegs_production_by_sl_TRegs_1(C1, IL2, alpha6, sl_TRegs);  // modifiers: IL2, sl_TRegs

  // Unit definitions:
  unit time = 86400 second;
  unit substance = 1e-3 mole;
  unit unit_0 = 1 / (1e-3 second); unit_0 is "1/ms";
  unit unit_1 = dimensionless^0;
  unit unit_2 = 1e-12 gram / litre; unit_2 is "pg/l";
  unit unit_3 = 1000 second; unit_3 is "ks";
  unit volume = litre;
  unit area = metre^2;
end
